// COMSOL Multiphysics 5.6.0.401 model "simplest_Heat_Equation.mph"
// Outline of the model tree

Parameters
  T0 = 20[K]
  T1 = 200[K]
  T2 = 123[K]
  L1_w = 1[cm]
  L1_h = 3[cm]
  L2_w = 5[cm]
  L2_h = 1[cm]

Geometry
  geom1 "Geometry 1" (2D, length unit cm)
    r1: Rectangle | size = {L1_w, L1_h}
    r2: Rectangle | size = {L2_w, L2_h}
    uni1: Union | input = r1, r2; intbnd = off; edge = all
    fin: Finalize "Form Union"

Materials
  mat1: Common "Copper" on all domains
    def "Basic"
      relpermeability = 1
      electricconductivity = 5.998e7[S/m]
      heatcapacity = 385[J/(kg*K)]
      relpermittivity = 1
      emissivity = 0.5
      density = 8940[kg/m^3]
      thermalconductivity = 400[W/(m*K)]
    Enu "Young's modulus and Poisson's ratio"
      youngsmodulus = 126e9[Pa]
      poissonsratio = 0.34
    linzRes "Linearized resistivity"
      rho0 = 1.667e-8[ohm*m]
      alpha = 3.862e-3[1/K]
      Tref = 293.15[K]

Physics
  ht: HeatTransfer "Heat Transfer in Solids" on all domains
    dependent variable T
    solid1: SolidHeatTransferModel "Solid 1" (default)
    init1: init "Initial Values 1" (default)
    ins1: ThermalInsulation (default)
    temp3: TemperatureBoundary "Temperature 0" on boundaries 1 | T0 = T0
    temp1: TemperatureBoundary "Temperature 1" on boundaries 8 | T0 = T1
    temp4: TemperatureBoundary "Temperature 3" on boundaries 4

Mesh
  mesh2 "Mesh 1"
    size: MeshSizeDefault | hmax = 0.335; hgrad = 1.3
    ftri1: FreeTri "Free Triangular 1" on remaining entities

Studies
  std1 "Study 1"
    time: Transient "Time Dependent" | tlist = range(0,0.1,5)

Solver configurations
  sol1 "Solution 1" (study std1)
    v1: Variables "Dependent Variables 1"
    t1: Time "Time-Dependent Solver 1"
      tlist = range(0,0.1,5)
      atolmethod = {comp1_T, global}
      atolvaluemethod = {comp1_T, factor}
      atol = {comp1_T, 1e-3}
      maxorder = 2
      estrat = exclude
      fc1: FullyCoupled
        linsolver = d1
        damp = 0.9
        jtech = once
        stabacc = aacc
        aaccdim = 5
        aaccmix = 0.9
        aaccdelay = 1
      d1: Direct "Direct, temperature (ht)" | linsolver = pardiso; pivotperturb = 1.0E-13

Datasets
  dset1: Solution | solution = sol1

Tables
  tbl1: Table "Table COMSOL-export"
    // System Matrix 1
    filename = /home/michael/Git/POD_with_Python_and_Comsol/comsol/data/L_shape__data.txt
    X | Y | T (K) @ t=0 | T (K) @ t=0.1 | T (K) @ t=0.2 | T (K) @ t=0.3 | T (K) @ t=0.4 | T (K) @ t=0.5 | T (K) @ t=0.6 | T (K) @ t=0.7 | T (K) @ t=0.8 | T (K) @ t=0.9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
    0.214336 | 2.77396 | 293.15 | 293.135 | 292.695 | 291.37 | 289.494 | 287.387 | 285.29 | 283.345 | 281.611 | 280.077
    0 | 3 | 293.15 | 293.15 | 293.15 | 293.15 | 293.15 | 293.15 | 293.15 | 293.15 | 293.15 | 293.15
    0 | 2.66667 | 293.15 | 293.114 | 292.317 | 290.207 | 287.373 | 284.26 | 281.193 | 278.36 | 275.837 | 273.609
    0.333333 | 3 | 293.15 | 293.15 | 293.15 | 293.15 | 293.15 | 293.15 | 293.15 | 293.15 | 293.15 | 293.15
    0.240724 | 2.49818 | 293.15 | 293.05 | 291.487 | 287.974 | 283.551 | 278.842 | 274.281 | 270.104 | 266.399 | 263.138
    0 | 2.33333 | 293.15 | 292.825 | 289.682 | 284.237 | 278.079 | 271.847 | 265.956 | 260.619 | 255.903 | 251.766
    0.497622 | 2.70496 | 293.15 | 293.131 | 292.595 | 290.915 | 288.478 | 285.718 | 282.969 | 280.424 | 278.161 | 276.163
    0.666667 | 3 | 293.15 | 293.15 | 293.15 | 293.15 | 293.15 | 293.15 | 293.15 | 293.15 | 293.15 | 293.15
    0.783565 | 2.77392 | 293.15 | 293.143 | 292.838 | 291.681 | 289.869 | 287.756 | 285.627 | 283.65 | 281.893 | 280.342
    1 | 3 | 293.15 | 293.15 | 293.15 | 293.15 | 293.15 | 293.15 | 293.15 | 293.15 | 293.15 | 293.15
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  tbl2: Table "Table redMol 5"
    Column 1 | Column 2 | Column 3 | Column 4 | Column 5 | Column 6 | Column 7 | Column 8
    0.214336 | 2.77396 | 0.0917483 | 0.215046 | 0.739234 | -0.332212 | 0.430226 | 1.21489
    0 | 3 | 0 | 0 | 0 | 0 | 0 | 0
    0 | 2.66667 | 0.132518 | 0.319761 | 1.06276 | -0.473229 | 0.592167 | 1.65531
    0.333333 | 3 | 0 | 0 | 0 | 0 | 0 | 0
    0.240724 | 2.49818 | 0.191023 | 0.497058 | 1.50336 | -0.649557 | 0.740728 | 2.02742
    0 | 2.33333 | 0.237873 | 0.673472 | 1.83386 | -0.763616 | 0.753632 | 1.98053
    0.497622 | 2.70496 | 0.118939 | 0.28733 | 0.94846 | -0.420663 | 0.53189 | 1.50161
    0.666667 | 3 | 0 | 0 | 0 | 0 | 0 | 0
    0.783565 | 2.77392 | 0.0925549 | 0.221807 | 0.73682 | -0.327003 | 0.42068 | 1.19853
    1 | 3 | 0 | 0 | 0 | 0 | 0 | 0
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
Plots
  pg1: PlotGroup2D "Temperature (ht)" | data = dset1
    surf1: Surface | expr = T

Exports
  tbl1: Table | table = tbl1; filename = /home/michael/Git/POD_with_Python_and_Comsol/comsol/Table.txt
  data1: Data "Data temperature"
    data = dset1
    expr = T
    filename = /home/michael/Git/POD_with_Python_and_Comsol/data/L_shape__data.txt