// COMSOL Multiphysics 5.6.0.401 model "L_with_nothing.mph"
// range(0.1,1,45)
// 10^{range(log10(0.1),1/10,log10(45))}
// Outline of the model tree

Parameters
  T0 = 20[K]
  T1 = 150[K]
  T2 = 200[K]

Selections
  nastransel1: FromMesh "ID 21 Import 1"
  nastransel2: FromMesh "ID 22 Import 1"
  nastransel3: FromMesh "ID 23 Import 1"
  nastransel4: FromMesh "ID 24 Import 1"
  nastransel5: FromMesh "ID 25 Import 1"
  nastransel6: FromMesh "ID 26 Import 1"
  nastransel7: FromMesh "ID 41 Import 1"

Geometry
  geom1 "Geometry 1" (2D, length unit cm)

Materials
  mat1: Common "Copper" on all domains
    def "Basic"
      relpermeability = 1
      electricconductivity = 5.998e7[S/m]
      heatcapacity = 385[J/(kg*K)]
      relpermittivity = 1
      emissivity = 0.5
      density = 8940[kg/m^3]
      thermalconductivity = 400[W/(m*K)]
    Enu "Young's modulus and Poisson's ratio"
      youngsmodulus = 126e9[Pa]
      poissonsratio = 0.34
    linzRes "Linearized resistivity"
      rho0 = 1.667e-8[ohm*m]
      alpha = 3.862e-3[1/K]
      Tref = 293.15[K]

Physics
  ht: HeatTransfer "Heat Transfer in Solids" on all domains
    dependent variable T
    solid1: SolidHeatTransferModel "Solid 1" (default)
    init1: init "Initial Values 1" (default) | Tinit = 273.15[K]
    ins1: ThermalInsulation (default)
    temp3: TemperatureBoundary "Temperature 0" on boundaries 1, 2, 4 | T0 = T0
    temp1: TemperatureBoundary "Temperature 1" on boundaries 6 | T0 = T1
    temp4: TemperatureBoundary "Temperature 4" on boundaries 5 | T0 = T2

Mesh
  mesh2 "Mesh 1"
    imp1: Import | source = nastran; filename = /home/michael/Desktop/all_in_one/x.bdf
    fin: Finalize

Studies
  std1 "Study 1"
    stat: Stationary
  std2 "Study 2"
    time: Transient "Time Dependent" | tlist = range(0,1,8)

Solver configurations
  sol1 "Solution 1" (study std1)
    v1: Variables "Dependent Variables 1"
    s1: Stationary "Stationary Solver 1"
      fc1: FullyCoupled | linsolver = d1; initstep = 0.01; minstep = 1.0E-6; maxiter = 50
      d1: Direct "Direct, temperature (ht)" | linsolver = pardiso; pivotperturb = 1.0E-13
  sol2 "Solution 2" (study std2)
    v1: Variables "Dependent Variables 1"
    t1: Time "Time-Dependent Solver 1"
      tlist = range(0,1,8)
      atolmethod = {comp1_T, global}
      atolvaluemethod = {comp1_T, factor}
      atol = {comp1_T, 1e-3}
      maxorder = 2
      estrat = exclude
      fc1: FullyCoupled
        linsolver = d1
        damp = 0.9
        jtech = once
        stabacc = aacc
        aaccdim = 5
        aaccmix = 0.9
        aaccdelay = 1
      d1: Direct "Direct, temperature (ht)" | linsolver = pardiso; pivotperturb = 1.0E-13

Datasets
  dset1: Solution | solution = sol1
  dset2: Solution | solution = sol2

Plots
  pg1: PlotGroup2D "Temperature (ht)" | data = dset1
    surf1: Surface | expr = T
  pg2: PlotGroup2D "Temperature (ht) 1" | data = dset2; axiscommonexp = off
    surf1: Surface | expr = T

Exports
  tbl1: Table | table = tbl1; filename = /home/michael/Git/POD_with_Python_and_Comsol/comsol/Table.txt
  data1: Data | data = dset2; expr = T; filename = /home/michael/Desktop/all_in_one/from_Comsol.txt