// COMSOL Multiphysics 5.6.0.401 model "Heat_Equation.mph"
// Outline of the model tree

Parameters
  T0 = 20[K]
  T1 = 200[K]
  T2 = 250[K]
  L1_w = 1[cm]
  L1_h = 3[cm]
  L2_w = 4[cm]
  L2_h = 1[cm]

Geometry
  geom1 "Geometry 1" (2D, length unit cm)
    r1: Rectangle | size = {L1_w, L1_h}
    r2: Rectangle | size = {L2_w, L2_h}
    uni1: Union | input = r1, r2; intbnd = off; edge = all
    fin: Finalize "Form Union"

Materials
  mat1: Common "Copper" on all domains
    def "Basic"
      relpermeability = 1
      electricconductivity = 5.998e7[S/m]
      heatcapacity = 385[J/(kg*K)]
      relpermittivity = 1
      emissivity = 0.5
      density = 8940[kg/m^3]
      thermalconductivity = 400[W/(m*K)]
    Enu "Young's modulus and Poisson's ratio"
      youngsmodulus = 126e9[Pa]
      poissonsratio = 0.34
    linzRes "Linearized resistivity"
      rho0 = 1.667e-8[ohm*m]
      alpha = 3.862e-3[1/K]
      Tref = 293.15[K]

Physics
  ht: HeatTransfer "Heat Transfer in Solids" on all domains
    dependent variable T
    solid1: SolidHeatTransferModel "Solid 1" (default)
    init1: init "Initial Values 1" (default)
    ins1: ThermalInsulation (default)
    temp3: TemperatureBoundary "Temperature 0" on boundaries 8 | T0 = T0
    temp1: TemperatureBoundary "Temperature 1" on boundaries 2, 7 | T0 = T1
    temp2: TemperatureBoundary "Temperature 2" on boundaries 1, 3, 4, 6 | T0 = T2

Mesh
  mesh1 "Mesh 1"
    size: MeshSizeDefault | hmax = 0.01; hgrad = 1.5
    ftri2: FreeTri "Free Triangular 2" on remaining entities
  mesh2 "Mesh 2"
    size: MeshSizeDefault | hmax = 0.268; hgrad = 1.3
    ftri1: FreeTri "Free Triangular 1" on remaining entities

Studies
  std1 "Study 1"
    time: Transient "Time Dependent" | tlist = range(0,0.1,1); mesh = {geom1, mesh2}

Solver configurations
  sol1 "Solution 1" (study std1)
    v1: Variables "Dependent Variables 1"
    t1: Time "Time-Dependent Solver 1"
      tlist = range(0,0.1,1)
      atolmethod = {comp1_T, global}
      atolvaluemethod = {comp1_T, factor}
      atol = {comp1_T, 1e-3}
      maxorder = 2
      estrat = exclude
      fc1: FullyCoupled
        linsolver = d1
        damp = 0.9
        jtech = once
        stabacc = aacc
        aaccdim = 5
        aaccmix = 0.9
        aaccdelay = 1
      d1: Direct "Direct, temperature (ht)" | linsolver = pardiso; pivotperturb = 1.0E-13
    a1: Assemble | K = on

Datasets
  dset1: Solution | solution = sol1

Derived values
  sys1: SystemMatrix | table = tbl1; solution = sol1

Plots
  pg1: PlotGroup2D "Temperature (ht)" | data = dset1
    surf1: Surface | expr = T

Exports
  data1: Data | data = dset1; expr = T; filename = /home/michael/Git/POD_with_Python_and_Comsol/comsol/Data.txt
  mesh1: Mesh | data = dset1; filename = Mesh.mphtxt; typedefault = mphascii
  tbl1: Table | table = tbl1; filename = /home/michael/Git/POD_with_Python_and_Comsol/comsol/Table.txt