// COMSOL Multiphysics 5.6.0.401 model "compare_COMSOL_freeFEM.mph"
// Outline of the model tree

Geometry
  geom1 "Geometry 1" (2D, length unit m)
    pol1: Polygon | source = table; table = {{0, 0}, {10, 0}, {10, 4}, {3, 4}, {3, 10}, {0, 10}, {0, 0}}
    fin: Finalize "Form Union"

Materials
  mat1: Common "Copper" on all domains
    def "Basic"
      relpermeability = 1
      electricconductivity = 5.998e7[S/m]
      heatcapacity = 385[J/(kg*K)]
      relpermittivity = 1
      emissivity = 0.5
      density = 8940[kg/m^3]
      thermalconductivity = 400[W/(m*K)]
    Enu "Young's modulus and Poisson's ratio"
      youngsmodulus = 126e9[Pa]
      poissonsratio = 0.34
    linzRes "Linearized resistivity"
      rho0 = 1.667e-8[ohm*m]
      alpha = 3.862e-3[1/K]
      Tref = 293.15[K]

Physics
  ht: HeatTransfer "Heat Transfer in Solids" (disabled) on all domains
    dependent variable T
    solid1: SolidHeatTransferModel "Solid 1" (default)
    init1: init "Initial Values 1" (default)
    ins1: ThermalInsulation (default)
    temp1: TemperatureBoundary "Temperature 1" on boundaries 6 | T0 = 0.33[K]
    temp2: TemperatureBoundary "Temperature 2" on boundaries 4 | T0 = 3[K]
    temp3: TemperatureBoundary "Temperature 3" on boundaries 1, 2, 4, 5 | T0 = 0
  es: Electrostatics on all domains
    dependent variable V
    EquationForm.form = Automatic
    ccn1: ChargeConservation (default)
    zc1: ZeroCharge (default)
    init1: init "Initial Values 1" (default) | V = 0
    pot1: ElectricPotential on boundaries 6 | V0 = 0.2
    pot2: ElectricPotential on boundaries 4 | V0 = 0.33
    pot3: ElectricPotential (disabled) on boundaries 1-3, 5 | V0 = 0
    fp1: FloatingPotential (disabled) on boundaries 1-3, 5

Mesh
  mesh1 "Mesh 1"
    size: MeshSizeDefault | hmax = 0.67; hmin = 0.003; hcurve = 0.3; hgrad = 1.3
    ftri1: FreeTri "Free Triangular 1" on remaining entities
      size1: Size on entire geometry | hauto = 1

Studies
  std1 "Study 1"
    stat: Stationary

Solver configurations
  sol1 "Solution 1" (study std1)
    v1: Variables "Dependent Variables 1"
    s1: Stationary "Stationary Solver 1"
      dDef: Direct
      fc1: FullyCoupled | linsolver = dDef

Datasets
  dset1: Solution | solution = sol1

Plots
  pg1: PlotGroup2D "Electric Potential (es)" | data = dset1
    surf1: Surface (disabled) | expr = V
    con1: Contour | expr = V; contourtype = filled